# Define constants
h_orb := 500 km
μ := 398600 km^3/s^2
R_E := 6378.1363 km
r_GEO := 42164 km
δ := 58.5107 deg
# Inclination Burn at Perigee Transfer Calculation
# Calculation of elliptical transfer orbit properties
r_p := h_orb + R_E = 6878.14 km
r_a := r_GEO = 42164 km
ecc := (r_a - r_p)/(r_a + r_p) = 0.719501
a := r_p/(1 - ecc) = 24521.1 km
# Calculation of orbital velocities of initial and final orbits
h_1 := sqrt(μ*r_p) = 52360.5 km^2/s
h_3 := sqrt(μ*r_a) = 129640 km^2/s
v_1 := h_1/r_p = 7.6126 km/s
v_3 := h_3/r_a = 3.07466 km/s
# Calculation of transfer orbit velocities
h := sqrt(2*μ*r_p*r_a/(r_p + r_a)) = 68660.2 km^2/s
v_p := h/r_p = 9.98239 km/s
v_a := h/r_a = 1.62841 km/s
# Calculation of insertion burn
Δv_1 := v_p - v_1 = 2.36978 km/s
# Calculation of circularisation burn and inclination burn
Δv_2 := sqrt(v_3^2 + v_a^2 - 2*v_3*v_a*cos(δ)) = 2.62198 km/s
# Calculation of circularisation burn & total delta V
Δv_1 := v_p - v_1 = 2.36978 km/s
Δv_tot := Δv_1 + Δv_2 = 4.99176 km/s
# Mass of the propellent needed
m_0 := 1700 kg
I_sp := 230 s
m_f := m_0/e^(Δv_tot/(I_sp*g)) = 185.91 kg
m_fuel := m_0 - m_f = 1514.09 kg
ζ := m_fuel/m_0 = 0.890641
λ := 1 - ζ = 0.109359
Δv_tot := 4.24 km/s
m_0 := 1700 kg
I_sp := 230 s
m_f := m_0/e^(Δv_tot/(I_sp*g)) = 259.449 kg
m_fuel := m_0 - m_f = 1440.55 kg
ζ := m_fuel/m_0 = 0.847383
λ := 1 - ζ = 0.152617
