# Define constants
h_orb := 500 km
R_E := 6378.1363 km
μ := 398600 km^3/s^2
r_GEO := 42164 km
# Equitorial Hohmann Transfer Calculation
# Calculation of transfer orbit properties
r_p := h_orb + R_E = 6878.14 km
r_a := r_GEO = 42164 km
ecc := (r_a - r_p)/(r_a + r_p) = 0.719501
a := r_p/(1 - ecc) = 24521.1 km
# Calculation of orbital velocities of initial and final orbits
h_1 := sqrt(μ*r_p) = 52360.5 km^2/s
h_3 := sqrt(μ*r_a) = 129640 km^2/s
v_1 := h_1/r_p = 7.6126 km/s
v_2 := h_3/r_a = 3.07466 km/s
# Calculation of apogee and perigee velocities of the transfer orbit
h := sqrt(2*μ*r_p*r_a/(r_p + r_a)) = 68660.2 km^2/s
v_p := h/r_p = 9.98239 km/s
v_a := h/r_a = 1.62841 km/s
# Calculation of delta V required for manuever
Δv_1 := v_p - v_1 = 2.36978 km/s
Δv_2 := v_2 - v_a = 1.44626 km/s
Δv_tot := Δv_1 + Δv_2 = 3.81604 km/s
# Calculation of transfer time and time for second burn
θ := 180 deg
E := 2*atan(sqrt((1 - ecc)/(1 + ecc))*tan(θ/2)) = 3.14159
M_e := E - ecc*sin(E) = 3.14159
t := sqrt(a^3/μ)*M_e = 19106.9 s
# Mass of the propellent needed
m_0 := 1700 kg
I_sp := 230 s
m_f := m_0/e^(Δv_tot/(I_sp*g)) = 313.1 kg
m_fuel := m_0 - m_f = 1386.9 kg
ζ := m_fuel/m_0 = 0.815823
λ := 1 - ζ = 0.184177
